// SBML level 2 version 3

model ssystem()

  // Compartments:
  compartment main;

  // Species:
  species a in main = 2/main;
  species b in main = 5e-2/main;
  species c in main = 5e-2/main;
  species d in main = 5e-2/main;
  species e in main = 5e-2/main;
  species f in main = 0;
  species g in main = 2/main;
  species h in main = 0;

  // Parameters:
  q = ;
  p = ;
  o = ;
  n = ;
  m = ;
  l = ;
  k = ;
  j = ;
  i = ;

  // Reactions:
  diff_a: -> a; 0.0;
  diff_b: a + e -> b; a - 7.19e-3*e^i;
  diff_c: f + c -> c; 7.19e-3*f^j - 9.707e-3*c^k;
  diff_d: e + f -> d; 7.19e-3*e^0.5 - 7.19e-3*f^l;
  diff_e: f + h -> e; 7.19e-3*f^m - h;
  diff_f: e + g -> f; 7.19e-3*e^n - g;
  diff_g: f + c -> g; 7.19e-3*f^o - 4.8535e-3*c^p;
  diff_h: e -> h; 7.19e-3*e^q;

  // Unit definitions:
  unit sunit = 1;
end
