// SBML level 2 version 3

model exp1()

  // Compartments:
  compartment main = 1;

  // Species:
  species a in main = 0;
  species b in main = 0;
  species c in main = 0;
  species d in main = 0;

  // Parameters:
  ra = 1;
  qa = 1;
  pa = 1;
  oa = 1;
  na = 1;
  ma = 1;
  la = 1;
  ka = 1;
  ja = 1;
  ia = 1;
  ha = 1;
  ga = 1;
  fa = 1;
  ea = 1;
  da = 1;
  ca = 1;
  ba = 1;
  aa = 1;
  z = 1;
  y = 1;
  x = 1;
  w = 1;
  v = 1;
  u = 1;
  t = 1;
  s = 1;
  r = 1;
  q = 1;
  p = 1;
  o = 1;
  n = 1;
  m = 1;
  l = 1;
  k = 1;
  j = 1;
  i = 1;
  h = 1;
  g = 1;
  f = 1;
  e = 1;

  // Reactions:
  diff_a: a + b + c + d -> b + c + d; e*a^g*b^h*c^i*d^j - f*a^k*b^l*c^m*d^n;
  diff_b: a + b + c + d -> a + c + d; o*a^q*b^r*c^s*d^t - p*a^u*b^v*c^w*d^x;
  diff_c: a + b + c + d -> a + b + d; y*a^aa*b^ba*c^ca*d^da - z*a^ea*b^fa*c^ga*d^ha;
  diff_d: a + b + c + d -> a + b + c; ia*a^ka*b^la*c^ma*d^na - ja*a^oa*b^pa*c^qa*d^ra;

  // Unit definitions:
  unit sunit = 1;
end
